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/batch
! ANSYS input file written by Workbench version 2024 R1
! File used for geometry attach: C:\Users\Prash\AppData\Local\Temp\WB_LUFFY_11208_2\wbnew_files\dp0\SYS\DM\SYS.dsco
/title,wbnew--Static Structural (A5)
/COM,/COM,     ANSYSMotion, 2024.1
/com,--- Data in consistent BIN units. See Solving Units in the help system for more information.
/units,BIN
/prep7
! Turn off shape checking because checks already performed inside WB mesher.
! See help system for more information.
SHPP,OFF,,NOWARN
etcon,set             ! allow ANSYS to choose best KEYOP's for 180x elements, resets any applicable keyopt to MAPDL defaults
/com,*********** Nodes for the whole assembly ***********
nblock,3,,6976
(1i9,3e20.9e3)
        1     6.942913386E+00     1.968017829E-08     1.250000000E-01
        2     7.061726057E+00     4.104468919E-02     1.250000000E-01
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-1
/com,*********** Elements for Body 1 "Bike Crank 2 rev 2011 x.375\Bike Crank 2 rev 2011 x.375" ***********
et,1,186
keyo,1,2,1          ! set full integration on SOLID186
eblock,19,solid,,1123
(19i9)
        1        1        1        1        0        0        0        0       20        0        1     1149     1430     1141     1139     1475     1756     1467     1465
     5542     5541     4682     4709     1976     6342     5617     5639     5638     6341     5618     5616
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-1
/com,*********** Send User Defined Coordinate System(s) ***********
csys,0
toffst,459.67,  ! Temperature offset from absolute zero
/com,*********** Set Reference Temperature ***********
tref,71.6
/com,*********** Send Materials ***********
MP,EX,1,9999999.99889292,	! slinch s^-2 in^-1
MP,NUXY,1,0.33,

!************************* Model Summary ********************
!Bike Crank 2 rev 2011 x.375\Bike Crank 2 rev 2011 x.375,	AL,	matid,	1
!************************* End Model Summary ********************
/com,*********** Fixed Supports ***********
CMBLOCK,_FIXEDSU,NODE,      336
(8i10)
        75        76        79        80        81        83        85        86
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
cmsel,s,_FIXEDSU
d,all,all
nsel,all
/com,*********** Define Force Using Surface Effect Elements ***********
local,12,0,0.,0.,0.,0.,0.,0.
csys,0
et,2,154
mat,2
eblock,10,,,8
(15i9)
     2286        2        2        2       12       20       22        5        1     2118     2072     2084     2082
     2287        2        2        2       12       37       40       22       20     2145     2071     2118     2081
     2288        2        2        2       12       25       29       30       26     2128     2074     2126     2076
     2289        2        2        2       12        1        5       29       25     2084     2073     2128     2075
     2290        2        2        2       12       51       55       40       37     2170     2068     2145     2078
     2291        2        2        2       12       58       60       55       51     2175     2067     2170     2077
     2292        2        2        2       12       44       47       60       58     2161     2070     2175     2080
     2293        2        2        2       12       26       30       47       44     2126     2069     2161     2079
-1
esel,s,type,,2
keyop,2,2,1                ! Apply load in local coordinate system
keyop,2,7,1                ! Use original area so load is constant in large deformation
esel,all
fini
/com,****************************************************************************
/com,*************************    SOLUTION       ********************************
/com,****************************************************************************
/solu
antype,0                   ! static analysis
nlgeom,on                  ! Turn on Large Deformation Effects
_thickRatio=  1     ! Ratio of thick parts in the model
eqsl,pcg,1e-8,,,,,,1
cntr,print,1               ! print out contact info and also make no initial contact an error
cncheck,dmp		!	Enable program controlled contact splitting for distributed memory parallel run
dmpoption,emat,no             ! Don't combine emat file for DANSYS
dmpoption,esav,no             ! Don't combine esav file for DANSYS
nldiag,cont,iter           ! print out contact info each equilibrium iteration
rescontrol,define,last,last,,dele	   ! Program Controlled
/com,****************************************************
/com,******************* SOLVE FOR LS 1 OF 1 ****************
esel,s,type,,2
nsle
sfe,all,1,pres,1,0.
sfe,all,2,pres,1,509.490902666799
sfe,all,3,pres,1,0.
nsel,all
esel,all
autots,on                  ! Workbench Program Controlled automatic time stepping
nsub,1,10,1                ! due to presence of general nonlinear
time,1.
outres,erase
outres,all,none
outres,nsol,all,
outres,rsol,all
outres,eangl,all
outres,etmp,all
outres,veng,all
outres,strs,all,
outres,epel,all,
outres,eppl,all,
outres,cont,all,
! *********** WB SOLVE COMMAND ***********
! check interactive state
*get,ANSINTER_,active,,int
*if,ANSINTER_,ne,0,then
/eof
*endif
solve
/com *************** Write FE CONNECTORS *********
CEWRITE,file,ce,,INTE
/com,****************************************************
/com,*************** FINISHED SOLVE FOR LS 1 *************
*get,_NSOLTHREADS,active,0,ntfs
*get,_NSOLPROCESSES,active,0,npfs
*get,_PCGITER,active,,solu,cgiter
/post1
fini
